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/batch
! ANSYS input file written by Workbench version 2019 R1
! File used for geometry attach: C:\Users\Miguel\AppData\Local\Temp\WB_MIGUEL_Miguel_20232_2\unsaved_project_files\dp0\Geom\DM\Geom.scdoc
/title,unsaved_project--Static Structural (B5)
/com,--- Data in consistent MKS units. See Solving Units in the help system for more information.
/units,MKS
/prep7
! Turn off shape checking because checks already performed inside WB mesher.
! See help system for more information.
SHPP,OFF,,NOWARN
etcon,set             ! allow ANSYS to choose best KEYOP's for 180x elements
/com,*********** Nodes for the whole assembly ***********
nblock,3,,20018
(1i9,3e20.9e3)
        1     2.257089808E-01     2.403848049E-01     4.800000000E-01
        2     2.257089808E-01     2.403848049E-01     5.200000000E-01
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-1
/com,*********** Elements for Body 1 "pieza T\Solid1" ***********
et,1,187
eblock,19,solid,,1446
(19i9)
        1        1        1        1        0        0        0        0       10        0     3303     8094     8253     8295     8293    10066    10625    10068    10067
    10624    10662
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-1
/com,*********** Elements for Body 2 "pieza T\Solid1" ***********
et,2,187
eblock,19,solid,,1446
(19i9)
        2        2        2        2        0        0        0        0       10        0     4749    10947    11106    11148    11146    12919    13478    12921    12920
    13477    13515
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-1
/com,*********** Elements for Body 3 "Tubo\Solid1" ***********
et,3,186
keyo,3,2,1          ! set full integration on SOLID186
eblock,19,solid,,224
(19i9)
        3        3        3        3        0        0        0        0       20        0     1684    15858    15865    15864    15860    16001    15994    15995    15999
    16183    16210    16191    16182    16661    16659    16664    16672    16185    16216    16213    16194
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-1
/com,*********** Elements for Body 4 "Tubo\Solid1" ***********
et,4,186
keyo,4,2,1          ! set full integration on SOLID186
eblock,19,solid,,224
(19i9)
        4        4        4        4        0        0        0        0       20        0     1460    13516    13523    13522    13518    13659    13652    13653    13657
    13841    13868    13849    13840    14319    14317    14322    14330    13843    13874    13871    13852
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-1
/com,*********** Elements for Body 5 "Tubo\Solid1" ***********
et,5,186
keyo,5,2,1          ! set full integration on SOLID186
eblock,19,solid,,224
(19i9)
        5        5        5        5        0        0        0        0       20        0     6209    14687    14694    14693    14689    14830    14823    14824    14828
    15012    15039    15020    15011    15490    15488    15493    15501    15014    15045    15042    15023
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-1
/com,*********** Elements for Body 6 "Tubo\Solid1" ***********
et,6,186
keyo,6,2,1          ! set full integration on SOLID186
eblock,19,solid,,224
(19i9)
        6        6        6        6        0        0        0        0       20        0     6621    17029    17036    17035    17031    17172    17165    17166    17170
    17354    17381    17362    17353    17832    17830    17835    17843    17356    17387    17384    17365
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-1
/com,*********** Elements for Body 7 "tubo.2\Solid1" ***********
et,7,186
keyo,7,2,1          ! set full integration on SOLID186
eblock,19,solid,,210
(19i9)
        7        7        7        7        0        0        0        0       20        0     1250     5608     5615     5614     5610     5742     5735     5736     5740
     5914     5941     5922     5913     6361     6359     6364     6372     5916     5947     5944     5925
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-1
/com,*********** Elements for Body 8 "tubo.2\Solid1" ***********
et,8,186
keyo,8,2,1          ! set full integration on SOLID186
eblock,19,solid,,210
(19i9)
        8        8        8        8        0        0        0        0       20        0     2317     3406     3413     3412     3408     3540     3533     3534     3538
     3712     3739     3720     3711     4159     4157     4162     4170     3714     3745     3742     3723
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-1
/com,*********** Elements for Body 9 "tubo.2\Solid1" ***********
et,9,186
keyo,9,2,1          ! set full integration on SOLID186
eblock,19,solid,,210
(19i9)
        9        9        9        9        0        0        0        0       20        0     2705     4507     4514     4513     4509     4641     4634     4635     4639
     4813     4840     4821     4812     5260     5258     5263     5271     4815     4846     4843     4824
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-1
/com,*********** Elements for Body 10 "tubo.2\Solid1" ***********
et,10,186
keyo,10,2,1          ! set full integration on SOLID186
eblock,19,solid,,210
(19i9)
       10       10       10       10        0        0        0        0       20        0     3093     6709     6716     6715     6711     6843     6836     6837     6841
     7015     7042     7023     7014     7462     7460     7465     7473     7017     7048     7045     7026
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-1
/com,*********** Elements for Body 11 "tubo 3\Solid1" ***********
et,11,186
keyo,11,2,1          ! set full integration on SOLID186
eblock,19,solid,,196
(19i9)
       11       11       11       11        0        0        0        0       20        0     1054     2375     2382     2381     2377     2500     2493     2494     2498
     2662     2689     2670     2661     3078     3076     3081     3089     2664     2695     2692     2673
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-1
/com,*********** Elements for Body 12 "Geom\Solid" ***********
et,12,187
eblock,19,solid,,1053
(19i9)
       12       12       12       12        0        0        0        0       10        0        1      409      423      445      436     2316     2349     2319     2318
     2348     2372
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-1
/com,*********** Send User Defined Coordinate System(s) ***********
csys,0
toffst,273.15,  ! Temperature offset from absolute zero
/com,*********** Set Reference Temperature ***********
tref,22.
/com,*********** Send Materials ***********
Temperature = 'TEMP' ! Temperature
MP,DENS,1,7850,	! kg m^-3
MP,ALPX,1,1.2e-05,	! C^-1
MP,C,1,434,	! J kg^-1 C^-1
MP,KXX,1,60.5,	! W m^-1 C^-1
MP,RSVX,1,1.7e-07,	! kg m^3 A^-2 s^-3
MP,EX,1,200000000000,	! Pa
MP,NUXY,1,0.3,
MP,MURX,1,10000,

Temperature = 'TEMP' ! Temperature
MP,DENS,2,7850,	! kg m^-3
MP,ALPX,2,1.2e-05,	! C^-1
MP,C,2,434,	! J kg^-1 C^-1
MP,KXX,2,60.5,	! W m^-1 C^-1
MP,RSVX,2,1.7e-07,	! kg m^3 A^-2 s^-3
MP,EX,2,200000000000,	! Pa
MP,NUXY,2,0.3,
MP,MURX,2,10000,

Temperature = 'TEMP' ! Temperature
MP,DENS,3,7850,	! kg m^-3
MP,ALPX,3,1.2e-05,	! C^-1
MP,C,3,434,	! J kg^-1 C^-1
MP,KXX,3,60.5,	! W m^-1 C^-1
MP,RSVX,3,1.7e-07,	! kg m^3 A^-2 s^-3
MP,EX,3,200000000000,	! Pa
MP,NUXY,3,0.3,
MP,MURX,3,10000,

Temperature = 'TEMP' ! Temperature
MP,DENS,4,7850,	! kg m^-3
MP,ALPX,4,1.2e-05,	! C^-1
MP,C,4,434,	! J kg^-1 C^-1
MP,KXX,4,60.5,	! W m^-1 C^-1
MP,RSVX,4,1.7e-07,	! kg m^3 A^-2 s^-3
MP,EX,4,200000000000,	! Pa
MP,NUXY,4,0.3,
MP,MURX,4,10000,

Temperature = 'TEMP' ! Temperature
MP,DENS,5,7850,	! kg m^-3
MP,ALPX,5,1.2e-05,	! C^-1
MP,C,5,434,	! J kg^-1 C^-1
MP,KXX,5,60.5,	! W m^-1 C^-1
MP,RSVX,5,1.7e-07,	! kg m^3 A^-2 s^-3
MP,EX,5,200000000000,	! Pa
MP,NUXY,5,0.3,
MP,MURX,5,10000,

Temperature = 'TEMP' ! Temperature
MP,DENS,6,7850,	! kg m^-3
MP,ALPX,6,1.2e-05,	! C^-1
MP,C,6,434,	! J kg^-1 C^-1
MP,KXX,6,60.5,	! W m^-1 C^-1
MP,RSVX,6,1.7e-07,	! kg m^3 A^-2 s^-3
MP,EX,6,200000000000,	! Pa
MP,NUXY,6,0.3,
MP,MURX,6,10000,

Temperature = 'TEMP' ! Temperature
MP,DENS,7,7850,	! kg m^-3
MP,ALPX,7,1.2e-05,	! C^-1
MP,C,7,434,	! J kg^-1 C^-1
MP,KXX,7,60.5,	! W m^-1 C^-1
MP,RSVX,7,1.7e-07,	! kg m^3 A^-2 s^-3
MP,EX,7,200000000000,	! Pa
MP,NUXY,7,0.3,
MP,MURX,7,10000,

Temperature = 'TEMP' ! Temperature
MP,DENS,8,7850,	! kg m^-3
MP,ALPX,8,1.2e-05,	! C^-1
MP,C,8,434,	! J kg^-1 C^-1
MP,KXX,8,60.5,	! W m^-1 C^-1
MP,RSVX,8,1.7e-07,	! kg m^3 A^-2 s^-3
MP,EX,8,200000000000,	! Pa
MP,NUXY,8,0.3,
MP,MURX,8,10000,

Temperature = 'TEMP' ! Temperature
MP,DENS,9,7850,	! kg m^-3
MP,ALPX,9,1.2e-05,	! C^-1
MP,C,9,434,	! J kg^-1 C^-1
MP,KXX,9,60.5,	! W m^-1 C^-1
MP,RSVX,9,1.7e-07,	! kg m^3 A^-2 s^-3
MP,EX,9,200000000000,	! Pa
MP,NUXY,9,0.3,
MP,MURX,9,10000,

Temperature = 'TEMP' ! Temperature
MP,DENS,10,7850,	! kg m^-3
MP,ALPX,10,1.2e-05,	! C^-1
MP,C,10,434,	! J kg^-1 C^-1
MP,KXX,10,60.5,	! W m^-1 C^-1
MP,RSVX,10,1.7e-07,	! kg m^3 A^-2 s^-3
MP,EX,10,200000000000,	! Pa
MP,NUXY,10,0.3,
MP,MURX,10,10000,

Temperature = 'TEMP' ! Temperature
MP,DENS,11,7850,	! kg m^-3
MP,ALPX,11,1.2e-05,	! C^-1
MP,C,11,434,	! J kg^-1 C^-1
MP,KXX,11,60.5,	! W m^-1 C^-1
MP,RSVX,11,1.7e-07,	! kg m^3 A^-2 s^-3
MP,EX,11,200000000000,	! Pa
MP,NUXY,11,0.3,
MP,MURX,11,10000,

Temperature = 'TEMP' ! Temperature
MP,DENS,12,7850,	! kg m^-3
MP,ALPX,12,1.2e-05,	! C^-1
MP,C,12,434,	! J kg^-1 C^-1
MP,KXX,12,60.5,	! W m^-1 C^-1
MP,RSVX,12,1.7e-07,	! kg m^3 A^-2 s^-3
MP,EX,12,200000000000,	! Pa
MP,NUXY,12,0.3,
MP,MURX,12,10000,

!************************* Model Summary ********************
!pieza T\Solid1,	Structural Steel,	matid,	1
!pieza T\Solid1,	Structural Steel,	matid,	2
!Tubo\Solid1,	Structural Steel,	matid,	3
!Tubo\Solid1,	Structural Steel,	matid,	4
!Tubo\Solid1,	Structural Steel,	matid,	5
!Tubo\Solid1,	Structural Steel,	matid,	6
!tubo.2\Solid1,	Structural Steel,	matid,	7
!tubo.2\Solid1,	Structural Steel,	matid,	8
!tubo.2\Solid1,	Structural Steel,	matid,	9
!tubo.2\Solid1,	Structural Steel,	matid,	10
!tubo 3\Solid1,	Structural Steel,	matid,	11
!Geom\Solid,	Structural Steel,	matid,	12
!************************* End Model Summary ********************
/com,*********** Create Contact "Contact Region" ***********
*set,tid,14
*set,cid,13
r,tid
r,cid
et,tid,170
et,cid,174
eblock,10,,,122
(15i9)
    10193       14       14       14        0     8078     7934     8074     8074     9159     9157     8074     9953
    10194       14       14       14        0     8073     7942     8079     8079     9217     9218     8079     9943
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-1
eblock,10,,,122
(15i9)
    10315       13       13       13        0     8078     7934     8074     8074     9159     9157     8074     9953
    10316       13       13       13        0     8073     7942     8079     8079     9217     9218     8079     9943
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-1
eblock,10,,,40
(15i9)
    10437       13       14       13        0     3643     3588     3584     3642     4286     4276     4277     4391
    10438       13       14       13        0     3644     3592     3588     3643     4295     4285     4286     4393
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-1
eblock,10,,,40
(15i9)
    10477       14       13       14        0     3643     3588     3584     3642     4286     4276     4277     4391
    10478       14       13       14        0     3644     3592     3588     3643     4295     4285     4286     4393
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-1
keyo,cid,8,2               ! auto create asymmetric contact (from Program Controlled setting)
keyo,cid,10,0              ! adjust contact stiffness each NR iteration (from Program Controlled setting)
keyo,cid,12,5              ! bonded always
keyo,cid,18,1              ! small sliding turned on by application
keyo,cid,2,0               ! augmented Lagrange (from Program Controlled setting)
keyo,cid,4,0               ! on Gauss point (from Program Controlled setting)
keyo,cid,9,1               ! ignore initial gaps/penetration
keyo,cid,7,0               ! No Prediction
rmod,tid,3,10.      ! FKN
rmod,tid,5,0.       ! ICONT
rmod,tid,6,0.       ! PINB
rmod,tid,10,0.      ! CNOF
rmod,tid,12,0.      ! FKT
rmod,tid,36,57      ! WB DSID
rmod,cid,3,10.      ! FKN
rmod,cid,5,0.       ! ICONT
rmod,cid,6,0.       ! PINB
rmod,cid,10,0.      ! CNOF
rmod,cid,12,0.      ! FKT
rmod,cid,36,57      ! WB DSID
/com,*********** Create Contact "Contact Region 2" ***********
*set,tid,16
*set,cid,15
r,tid
r,cid
et,tid,170
et,cid,174
eblock,10,,,47
(15i9)
    10517       16       16       16        0     7810     7811     8218     8218     8296     8306     8218     8299
    10518       16       16       16        0     7811     8010     8218     8218     8304     9657     8218     8306
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-1
eblock,10,,,47
(15i9)
    10564       15       15       15        0     7810     7811     8218     8218     8296     8306     8218     8299
    10565       15       15       15        0     7811     8010     8218     8218     8304     9657     8218     8306
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-1
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eblock,10,,,24
(15i9)
    10635       16       15       16        0     2492     2498     2494     2494     3074     3081     2494     3072
    10636       16       15       16        0     2572     2496     2574     2574     3085     3086     2574     3254
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-1
keyo,cid,8,2               ! auto create asymmetric contact (from Program Controlled setting)
keyo,cid,10,0              ! adjust contact stiffness each NR iteration (from Program Controlled setting)
keyo,cid,12,5              ! bonded always
keyo,cid,18,1              ! small sliding turned on by application
keyo,cid,2,0               ! augmented Lagrange (from Program Controlled setting)
keyo,cid,4,0               ! on Gauss point (from Program Controlled setting)
keyo,cid,9,1               ! ignore initial gaps/penetration
keyo,cid,7,0               ! No Prediction
rmod,tid,3,10.      ! FKN
rmod,tid,5,0.       ! ICONT
rmod,tid,6,0.       ! PINB
rmod,tid,10,0.      ! CNOF
rmod,tid,12,0.      ! FKT
rmod,tid,36,60      ! WB DSID
rmod,cid,3,10.      ! FKN
rmod,cid,5,0.       ! ICONT
rmod,cid,6,0.       ! PINB
rmod,cid,10,0.      ! CNOF
rmod,cid,12,0.      ! FKT
rmod,cid,36,60      ! WB DSID
/com,*********** Create Contact "Contact Region 3" ***********
*set,tid,18
*set,cid,17
r,tid
r,cid
et,tid,170
et,cid,174
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eblock,10,,,40
(15i9)
    10943       18       17       18        0     6945     6981     6977     6946     7695     7752     7697     7694
    10944       18       17       18        0     6944     6985     6981     6945     7693     7759     7695     7692
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-1
keyo,cid,8,2               ! auto create asymmetric contact (from Program Controlled setting)
keyo,cid,10,0              ! adjust contact stiffness each NR iteration (from Program Controlled setting)
keyo,cid,12,5              ! bonded always
keyo,cid,18,1              ! small sliding turned on by application
keyo,cid,2,0               ! augmented Lagrange (from Program Controlled setting)
keyo,cid,4,0               ! on Gauss point (from Program Controlled setting)
keyo,cid,9,1               ! ignore initial gaps/penetration
keyo,cid,7,0               ! No Prediction
rmod,tid,3,10.      ! FKN
rmod,tid,5,0.       ! ICONT
rmod,tid,6,0.       ! PINB
rmod,tid,10,0.      ! CNOF
rmod,tid,12,0.      ! FKT
rmod,tid,36,63      ! WB DSID
rmod,cid,3,10.      ! FKN
rmod,cid,5,0.       ! ICONT
rmod,cid,6,0.       ! PINB
rmod,cid,10,0.      ! CNOF
rmod,cid,12,0.      ! FKT
rmod,cid,36,63      ! WB DSID
/com,*********** Create Contact "Contact Region 4" ***********
*set,tid,20
*set,cid,19
r,tid
r,cid
et,tid,170
et,cid,174
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eblock,10,,,24
(15i9)
    11101       20       19       20        0     2509     2507     2503     2503     3112     3100     2503     3101
    11102       20       19       20        0     2519     2517     2505     2505     3131     3107     2505     3108
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-1
keyo,cid,8,2               ! auto create asymmetric contact (from Program Controlled setting)
keyo,cid,10,0              ! adjust contact stiffness each NR iteration (from Program Controlled setting)
keyo,cid,12,5              ! bonded always
keyo,cid,18,1              ! small sliding turned on by application
keyo,cid,2,0               ! augmented Lagrange (from Program Controlled setting)
keyo,cid,4,0               ! on Gauss point (from Program Controlled setting)
keyo,cid,9,1               ! ignore initial gaps/penetration
keyo,cid,7,0               ! No Prediction
rmod,tid,3,10.      ! FKN
rmod,tid,5,0.       ! ICONT
rmod,tid,6,0.       ! PINB
rmod,tid,10,0.      ! CNOF
rmod,tid,12,0.      ! FKT
rmod,tid,36,66      ! WB DSID
rmod,cid,3,10.      ! FKN
rmod,cid,5,0.       ! ICONT
rmod,cid,6,0.       ! PINB
rmod,cid,10,0.      ! CNOF
rmod,cid,12,0.      ! FKT
rmod,cid,36,66      ! WB DSID
/com,*********** Create Contact "Contact Region 5" ***********
*set,tid,22
*set,cid,21
r,tid
r,cid
et,tid,170
et,cid,174
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eblock,10,,,14
(15i9)
    11147       22       21       22        0     5734     5740     5736     5736     6357     6364     5736     6355
    11148       22       21       22        0     5818     5738     5820     5820     6368     6369     5820     6546
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-1
keyo,cid,8,2               ! auto create asymmetric contact (from Program Controlled setting)
keyo,cid,10,0              ! adjust contact stiffness each NR iteration (from Program Controlled setting)
keyo,cid,12,5              ! bonded always
keyo,cid,18,1              ! small sliding turned on by application
keyo,cid,2,0               ! augmented Lagrange (from Program Controlled setting)
keyo,cid,4,0               ! on Gauss point (from Program Controlled setting)
keyo,cid,9,1               ! ignore initial gaps/penetration
keyo,cid,7,0               ! No Prediction
rmod,tid,3,10.      ! FKN
rmod,tid,5,0.       ! ICONT
rmod,tid,6,0.       ! PINB
rmod,tid,10,0.      ! CNOF
rmod,tid,12,0.      ! FKT
rmod,tid,36,69      ! WB DSID
rmod,cid,3,10.      ! FKN
rmod,cid,5,0.       ! ICONT
rmod,cid,6,0.       ! PINB
rmod,cid,10,0.      ! CNOF
rmod,cid,12,0.      ! FKT
rmod,cid,36,69      ! WB DSID
/com,*********** Create Contact "Contact Region 6" ***********
*set,tid,24
*set,cid,23
r,tid
r,cid
et,tid,170
et,cid,174
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eblock,10,,,13
(15i9)
    11180       24       23       24        0     3532     3538     3534     3534     4155     4162     3534     4153
    11181       24       23       24        0     3616     3536     3618     3618     4166     4167     3618     4344
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-1
keyo,cid,8,2               ! auto create asymmetric contact (from Program Controlled setting)
keyo,cid,10,0              ! adjust contact stiffness each NR iteration (from Program Controlled setting)
keyo,cid,12,5              ! bonded always
keyo,cid,18,1              ! small sliding turned on by application
keyo,cid,2,0               ! augmented Lagrange (from Program Controlled setting)
keyo,cid,4,0               ! on Gauss point (from Program Controlled setting)
keyo,cid,9,1               ! ignore initial gaps/penetration
keyo,cid,7,0               ! No Prediction
rmod,tid,3,10.      ! FKN
rmod,tid,5,0.       ! ICONT
rmod,tid,6,0.       ! PINB
rmod,tid,10,0.      ! CNOF
rmod,tid,12,0.      ! FKT
rmod,tid,36,72      ! WB DSID
rmod,cid,3,10.      ! FKN
rmod,cid,5,0.       ! ICONT
rmod,cid,6,0.       ! PINB
rmod,cid,10,0.      ! CNOF
rmod,cid,12,0.      ! FKT
rmod,cid,36,72      ! WB DSID
/com,*********** Create Contact "Contact Region 7" ***********
*set,tid,26
*set,cid,25
r,tid
r,cid
et,tid,170
et,cid,174
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eblock,10,,,42
(15i9)
    11275       26       25       26        0      157      158      240      240     1297     1302      240     1299
    11276       26       25       26        0      217      157      240      240     1298     1299      240     1571
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-1
keyo,cid,8,2               ! auto create asymmetric contact (from Program Controlled setting)
keyo,cid,10,0              ! adjust contact stiffness each NR iteration (from Program Controlled setting)
keyo,cid,12,5              ! bonded always
keyo,cid,18,1              ! small sliding turned on by application
keyo,cid,2,0               ! augmented Lagrange (from Program Controlled setting)
keyo,cid,4,0               ! on Gauss point (from Program Controlled setting)
keyo,cid,9,1               ! ignore initial gaps/penetration
keyo,cid,7,0               ! No Prediction
rmod,tid,3,10.      ! FKN
rmod,tid,5,0.       ! ICONT
rmod,tid,6,0.       ! PINB
rmod,tid,10,0.      ! CNOF
rmod,tid,12,0.      ! FKT
rmod,tid,36,75      ! WB DSID
rmod,cid,3,10.      ! FKN
rmod,cid,5,0.       ! ICONT
rmod,cid,6,0.       ! PINB
rmod,cid,10,0.      ! CNOF
rmod,cid,12,0.      ! FKT
rmod,cid,36,75      ! WB DSID
/com,*********** Create Contact "Contact Region 8" ***********
*set,tid,28
*set,cid,27
r,tid
r,cid
et,tid,170
et,cid,174
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eblock,10,,,14
(15i9)
    11335       28       27       28        0     5751     5749     5745     5745     6395     6383     5745     6384
    11336       28       27       28        0     5761     5759     5747     5747     6414     6390     5747     6391
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-1
keyo,cid,8,2               ! auto create asymmetric contact (from Program Controlled setting)
keyo,cid,10,0              ! adjust contact stiffness each NR iteration (from Program Controlled setting)
keyo,cid,12,5              ! bonded always
keyo,cid,18,1              ! small sliding turned on by application
keyo,cid,2,0               ! augmented Lagrange (from Program Controlled setting)
keyo,cid,4,0               ! on Gauss point (from Program Controlled setting)
keyo,cid,9,1               ! ignore initial gaps/penetration
keyo,cid,7,0               ! No Prediction
rmod,tid,3,10.      ! FKN
rmod,tid,5,0.       ! ICONT
rmod,tid,6,0.       ! PINB
rmod,tid,10,0.      ! CNOF
rmod,tid,12,0.      ! FKT
rmod,tid,36,78      ! WB DSID
rmod,cid,3,10.      ! FKN
rmod,cid,5,0.       ! ICONT
rmod,cid,6,0.       ! PINB
rmod,cid,10,0.      ! CNOF
rmod,cid,12,0.      ! FKT
rmod,cid,36,78      ! WB DSID
/com,*********** Create Contact "Contact Region 9" ***********
*set,tid,30
*set,cid,29
r,tid
r,cid
et,tid,170
et,cid,174
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eblock,10,,,14
(15i9)
    11369       30       29       30        0     6852     6850     6846     6846     7496     7484     6846     7485
    11370       30       29       30        0     6862     6860     6848     6848     7515     7491     6848     7492
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-1
keyo,cid,8,2               ! auto create asymmetric contact (from Program Controlled setting)
keyo,cid,10,0              ! adjust contact stiffness each NR iteration (from Program Controlled setting)
keyo,cid,12,5              ! bonded always
keyo,cid,18,1              ! small sliding turned on by application
keyo,cid,2,0               ! augmented Lagrange (from Program Controlled setting)
keyo,cid,4,0               ! on Gauss point (from Program Controlled setting)
keyo,cid,9,1               ! ignore initial gaps/penetration
keyo,cid,7,0               ! No Prediction
rmod,tid,3,10.      ! FKN
rmod,tid,5,0.       ! ICONT
rmod,tid,6,0.       ! PINB
rmod,tid,10,0.      ! CNOF
rmod,tid,12,0.      ! FKT
rmod,tid,36,81      ! WB DSID
rmod,cid,3,10.      ! FKN
rmod,cid,5,0.       ! ICONT
rmod,cid,6,0.       ! PINB
rmod,cid,10,0.      ! CNOF
rmod,cid,12,0.      ! FKT
rmod,cid,36,81      ! WB DSID
/com,*********** Create Contact "Contact Region 10" ***********
*set,tid,32
*set,cid,31
r,tid
r,cid
et,tid,170
et,cid,174
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eblock,10,,,42
(15i9)
    11465       32       31       32        0      147      150      235      235     1247     1267      235     1250
    11466       32       31       32        0      211      147      235      235     1249     1250      235     1551
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-1
keyo,cid,8,2               ! auto create asymmetric contact (from Program Controlled setting)
keyo,cid,10,0              ! adjust contact stiffness each NR iteration (from Program Controlled setting)
keyo,cid,12,5              ! bonded always
keyo,cid,18,1              ! small sliding turned on by application
keyo,cid,2,0               ! augmented Lagrange (from Program Controlled setting)
keyo,cid,4,0               ! on Gauss point (from Program Controlled setting)
keyo,cid,9,1               ! ignore initial gaps/penetration
keyo,cid,7,0               ! No Prediction
rmod,tid,3,10.      ! FKN
rmod,tid,5,0.       ! ICONT
rmod,tid,6,0.       ! PINB
rmod,tid,10,0.      ! CNOF
rmod,tid,12,0.      ! FKT
rmod,tid,36,84      ! WB DSID
rmod,cid,3,10.      ! FKN
rmod,cid,5,0.       ! ICONT
rmod,cid,6,0.       ! PINB
rmod,cid,10,0.      ! CNOF
rmod,cid,12,0.      ! FKT
rmod,cid,36,84      ! WB DSID
/com,*********** Create Contact "Contact Region 11" ***********
*set,tid,34
*set,cid,33
r,tid
r,cid
et,tid,170
et,cid,174
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eblock,10,,,14
(15i9)
    11529       34       33       34        0     4633     4639     4635     4635     5256     5263     4635     5254
    11530       34       33       34        0     4717     4637     4719     4719     5267     5268     4719     5445
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-1
keyo,cid,8,2               ! auto create asymmetric contact (from Program Controlled setting)
keyo,cid,10,0              ! adjust contact stiffness each NR iteration (from Program Controlled setting)
keyo,cid,12,5              ! bonded always
keyo,cid,18,1              ! small sliding turned on by application
keyo,cid,2,0               ! augmented Lagrange (from Program Controlled setting)
keyo,cid,4,0               ! on Gauss point (from Program Controlled setting)
keyo,cid,9,1               ! ignore initial gaps/penetration
keyo,cid,7,0               ! No Prediction
rmod,tid,3,10.      ! FKN
rmod,tid,5,0.       ! ICONT
rmod,tid,6,0.       ! PINB
rmod,tid,10,0.      ! CNOF
rmod,tid,12,0.      ! FKT
rmod,tid,36,87      ! WB DSID
rmod,cid,3,10.      ! FKN
rmod,cid,5,0.       ! ICONT
rmod,cid,6,0.       ! PINB
rmod,cid,10,0.      ! CNOF
rmod,cid,12,0.      ! FKT
rmod,cid,36,87      ! WB DSID
/com,*********** Create Contact "Contact Region 12" ***********
*set,tid,36
*set,cid,35
r,tid
r,cid
et,tid,170
et,cid,174
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eblock,10,,,14
(15i9)
    11563       36       35       36        0     6835     6841     6837     6837     7458     7465     6837     7456
    11564       36       35       36        0     6919     6839     6921     6921     7469     7470     6921     7647
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-1
keyo,cid,8,2               ! auto create asymmetric contact (from Program Controlled setting)
keyo,cid,10,0              ! adjust contact stiffness each NR iteration (from Program Controlled setting)
keyo,cid,12,5              ! bonded always
keyo,cid,18,1              ! small sliding turned on by application
keyo,cid,2,0               ! augmented Lagrange (from Program Controlled setting)
keyo,cid,4,0               ! on Gauss point (from Program Controlled setting)
keyo,cid,9,1               ! ignore initial gaps/penetration
keyo,cid,7,0               ! No Prediction
rmod,tid,3,10.      ! FKN
rmod,tid,5,0.       ! ICONT
rmod,tid,6,0.       ! PINB
rmod,tid,10,0.      ! CNOF
rmod,tid,12,0.      ! FKT
rmod,tid,36,90      ! WB DSID
rmod,cid,3,10.      ! FKN
rmod,cid,5,0.       ! ICONT
rmod,cid,6,0.       ! PINB
rmod,cid,10,0.      ! CNOF
rmod,cid,12,0.      ! FKT
rmod,cid,36,90      ! WB DSID
/com,*********** Create Contact "Contact Region 13" ***********
*set,tid,38
*set,cid,37
r,tid
r,cid
et,tid,170
et,cid,174
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eblock,10,,,42
(15i9)
    11659       38       37       38        0      115      118      225      225     1057     1074      225     1059
    11660       38       37       38        0      196      115      225      225     1058     1059      225     1505
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-1
keyo,cid,8,2               ! auto create asymmetric contact (from Program Controlled setting)
keyo,cid,10,0              ! adjust contact stiffness each NR iteration (from Program Controlled setting)
keyo,cid,12,5              ! bonded always
keyo,cid,18,1              ! small sliding turned on by application
keyo,cid,2,0               ! augmented Lagrange (from Program Controlled setting)
keyo,cid,4,0               ! on Gauss point (from Program Controlled setting)
keyo,cid,9,1               ! ignore initial gaps/penetration
keyo,cid,7,0               ! No Prediction
rmod,tid,3,10.      ! FKN
rmod,tid,5,0.       ! ICONT
rmod,tid,6,0.       ! PINB
rmod,tid,10,0.      ! CNOF
rmod,tid,12,0.      ! FKT
rmod,tid,36,93      ! WB DSID
rmod,cid,3,10.      ! FKN
rmod,cid,5,0.       ! ICONT
rmod,cid,6,0.       ! PINB
rmod,cid,10,0.      ! CNOF
rmod,cid,12,0.      ! FKT
rmod,cid,36,93      ! WB DSID
/com,*********** Create Contact "Contact Region 14" ***********
*set,tid,40
*set,cid,39
r,tid
r,cid
et,tid,170
et,cid,174
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eblock,10,,,13
(15i9)
    11722       40       39       40        0     3549     3547     3543     3543     4193     4181     3543     4182
    11723       40       39       40        0     3559     3557     3545     3545     4212     4188     3545     4189
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-1
keyo,cid,8,2               ! auto create asymmetric contact (from Program Controlled setting)
keyo,cid,10,0              ! adjust contact stiffness each NR iteration (from Program Controlled setting)
keyo,cid,12,5              ! bonded always
keyo,cid,18,1              ! small sliding turned on by application
keyo,cid,2,0               ! augmented Lagrange (from Program Controlled setting)
keyo,cid,4,0               ! on Gauss point (from Program Controlled setting)
keyo,cid,9,1               ! ignore initial gaps/penetration
keyo,cid,7,0               ! No Prediction
rmod,tid,3,10.      ! FKN
rmod,tid,5,0.       ! ICONT
rmod,tid,6,0.       ! PINB
rmod,tid,10,0.      ! CNOF
rmod,tid,12,0.      ! FKT
rmod,tid,36,96      ! WB DSID
rmod,cid,3,10.      ! FKN
rmod,cid,5,0.       ! ICONT
rmod,cid,6,0.       ! PINB
rmod,cid,10,0.      ! CNOF
rmod,cid,12,0.      ! FKT
rmod,cid,36,96      ! WB DSID
/com,*********** Create Contact "Contact Region 15" ***********
*set,tid,42
*set,cid,41
r,tid
r,cid
et,tid,170
et,cid,174
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eblock,10,,,14
(15i9)
    11759       42       41       42        0     4650     4648     4644     4644     5294     5282     4644     5283
    11760       42       41       42        0     4660     4658     4646     4646     5313     5289     4646     5290
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-1
keyo,cid,8,2               ! auto create asymmetric contact (from Program Controlled setting)
keyo,cid,10,0              ! adjust contact stiffness each NR iteration (from Program Controlled setting)
keyo,cid,12,5              ! bonded always
keyo,cid,18,1              ! small sliding turned on by application
keyo,cid,2,0               ! augmented Lagrange (from Program Controlled setting)
keyo,cid,4,0               ! on Gauss point (from Program Controlled setting)
keyo,cid,9,1               ! ignore initial gaps/penetration
keyo,cid,7,0               ! No Prediction
rmod,tid,3,10.      ! FKN
rmod,tid,5,0.       ! ICONT
rmod,tid,6,0.       ! PINB
rmod,tid,10,0.      ! CNOF
rmod,tid,12,0.      ! FKT
rmod,tid,36,99      ! WB DSID
rmod,cid,3,10.      ! FKN
rmod,cid,5,0.       ! ICONT
rmod,cid,6,0.       ! PINB
rmod,cid,10,0.      ! CNOF
rmod,cid,12,0.      ! FKT
rmod,cid,36,99      ! WB DSID
/com,*********** Create Contact "Contact Region 16" ***********
*set,tid,44
*set,cid,43
r,tid
r,cid
et,tid,170
et,cid,174
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eblock,10,,,42
(15i9)
    11855       44       43       44        0      125      138      228      228     1109     1193      228     1112
    11856       44       43       44        0      208      140      227      227     1199     1200      227     1541
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-1
keyo,cid,8,2               ! auto create asymmetric contact (from Program Controlled setting)
keyo,cid,10,0              ! adjust contact stiffness each NR iteration (from Program Controlled setting)
keyo,cid,12,5              ! bonded always
keyo,cid,18,1              ! small sliding turned on by application
keyo,cid,2,0               ! augmented Lagrange (from Program Controlled setting)
keyo,cid,4,0               ! on Gauss point (from Program Controlled setting)
keyo,cid,9,1               ! ignore initial gaps/penetration
keyo,cid,7,0               ! No Prediction
rmod,tid,3,10.      ! FKN
rmod,tid,5,0.       ! ICONT
rmod,tid,6,0.       ! PINB
rmod,tid,10,0.      ! CNOF
rmod,tid,12,0.      ! FKT
rmod,tid,36,102     ! WB DSID
rmod,cid,3,10.      ! FKN
rmod,cid,5,0.       ! ICONT
rmod,cid,6,0.       ! PINB
rmod,cid,10,0.      ! CNOF
rmod,cid,12,0.      ! FKT
rmod,cid,36,102     ! WB DSID
nsel,all
esel,all
/com,*********** Fixed Supports ***********
CMBLOCK,_FIXEDSU,NODE,      610
(8i10)
         1         4         5         6         7         8         9        10
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cmsel,s,_FIXEDSU
d,all,all
nsel,all
/com,*********** Define Pressure Vector Using Surface Effect Elements ***********
local,12,0,0.,0.,0.,0.,0.,0.
csys,0
et,45,154
eblock,10,,,140
(15i9)
    11897       45       45       45       12     2591     2520     2576     2577     3139     3138     3259     3260
    11898       45       45       45       12     2592     2524     2520     2591     3151     3137     3139     3287
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-1
esel,s,type,,45
keyop,45,2,1                ! Apply load in local coordinate system
keyop,45,11,2               ! Use real and not project area
esel,all
fini
/com,****************************************************************************
/com,*************************    SOLUTION       ********************************
/com,****************************************************************************
/solu
antype,0                   ! static analysis
eqsl,pcg,1e-8,,,,,,1
cntr,print,1               ! print out contact info and also make no initial contact an error
dmpoption,emat,no             ! Don't combine emat file for DANSYS
dmpoption,esav,no             ! Don't combine esav file for DANSYS
nldiag,cont,iter           ! print out contact info each equilibrium iteration
rescontrol,,none                 ! Do not keep any restart files
/com,****************************************************
/com,******************* SOLVE FOR LS 1 OF 1 ****************
esel,s,type,,45
nsle
sfe,all,1,pres,1,0.
sfe,all,2,pres,1,0.
sfe,all,3,pres,1,-140.
nsel,all
esel,all
nsub,1,1,1
time,1.
outres,erase
outres,all,none
outres,nsol,all,
outres,rsol,all
outres,strs,all,
outres,eangl,all
outres,fmag,all
outres,curd,all
outres,nldat,all
outres,eheat,all
outres,etmp,all
outres,srfs,all
outres,cont,all
outres,bkstr,all
outres,veng,all
outres,epel,all,
outres,eppl,all,
stabilize,off                   ! Stabilization turned OFF by user
! *********** WB SOLVE COMMAND ***********
! check interactive state
*get,ANSINTER_,active,,int
*if,ANSINTER_,ne,0,then
/eof
*endif
solve
/com *************** Write FE CONNECTORS *********
CEWRITE,file,ce,,INTE
/com,****************************************************
/com,*************** FINISHED SOLVE FOR LS 1 *************
*get,_PCGITER,active,,solu,cgiter
/post1
fini
